*Heading
**
** Job name: Surfalex_18p
**
** FEATURES
** Inhomogeneity factor: 0.9
** Material angle: 0 (deg)
** Groove angle: 60 (deg)
** Strain rate: 25 (/s)
** Law: Barlat
**
 units : mm,N,kg
**
*Preprint, echo=NO, model=NO, history=NO, contact=NO
**
** PART
*Part,name=MK_sample
**
*End part
**
**
** ASSEMBLY
*Assembly,name=Assembly
**
**
** INSTANCE
*Instance, name=MK_sample-1, part=MK_sample
**
**
*Node, nset=Sheet_nodes
1, 4.803848, 0.000000, 0.000000
2, 16.350853, 20.000000, 0.000000
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**
**
**
**
*Element, type=C3D8R, elset=Sheet_Elements
1, 2275, 1806, 1805, 2417, 7709, 7240, 7239, 7851
2, 1971, 1511, 1512, 1515, 7405, 6945, 6946, 6949
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**
**
*Orientation, name=Ori
 1.0,  -0.0,  0.0,  0.0,  1.0,  0.0
3, 0.
**
** SECTION
*Solid Section, elset=Sheet_Elements, orientation=Ori, material=Material-1
,
*End Instance
**
**
**Node_Set : Bottom_nodes
*nset, nset=Bottom_nodes, instance=MK_sample-1
 1,  4,  162,  163,  164,  165
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**
**
**Node_Set : Upper_nodes
*nset, nset=Upper_nodes, instance=MK_sample-1
 2,  3,  82,  83,  84,  85
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**
**
**Node_Set : Left_nodes
*nset, nset=Left_nodes, instance=MK_sample-1
 2641,  2642,  2733,  2734,  2735,  2736
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**
**
**Node_Set : Right_nodes
*nset, nset=Right_nodes, instance=MK_sample-1
 3,  4,  95,  96,  97,  98
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**
**
**Element_Set : Middle_element
*elset, elset=Middle_element, instance=MK_sample-1
5179
**
**
**Element_Set : Corner_element
*elset, elset=Corner_element, instance=MK_sample-1
1
**
**
*End Assembly
**
**
*Amplitude, name=Amp-1
 0.0,  0.0,  0.0004,  0.2010033,  0.0008,  0.4040268,  0.0012,  0.6090907
 0.0016,  0.8162155,  0.002,  1.0254219,  0.0024,  1.2367309,  0.0028,  1.4501636
 0.0032,  1.6657414,  0.0036,  1.8834857,  0.004,  2.1034184,  0.0044,  2.3255614
 0.0048,  2.549937,  0.0052,  2.7765677,  0.0056,  3.005476,  0.006,  3.2366849
 0.0064,  3.4702174,  0.0068,  3.706097,  0.0072,  3.9443473,  0.0076,  4.184992
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 0.16,  1071.963001
**
**
** ---------------------------------------------------------------------
** MATERIALS
**
*Material, name=Material-1
*Density
 2.700e-09
**
*Elastic
 70000.00, 0.3300
**
*Plastic
 60.0,  0.0
 81.9177,  0.00795
 101.132,  0.0159
 117.448,  0.02385
 131.611,  0.03179
 144.075,  0.03974
 155.16,  0.04769
 165.103,  0.05564
 174.092,  0.06359
 182.276,  0.07154
 189.771,  0.07949
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 292.577,  1.0
**
*potential, type=barlat, power=5
0.708700, 0.907400, 1.137600, 1.152600 ,1.485100, 1.163700, 0.303900, 0.673100
0.578000, 0.964600, 1.018600, 1.426900 ,1.196800, 0.594100, 0.677200, 0.656700
0.249700, 0.411250
**
** ---------------------------------------------------------------------
** STEP
**
*Step, name=Step-1, nlgeom=YES
*Dynamic, Explicit
, 0.018, , 1e-05
*Bulk Viscosity
 0.100, 0.100
**
**
** BOUNDARY CONDITIONS
**
** Name: BC-1 (Left) Type: Displacement/Rotation
*Boundary, amplitude=Amp-1
Left_nodes, 1, 1, -0.50000
** Name: BC-1 (Right) Type: Displacement/Rotation
*Boundary, amplitude=Amp-1
Right_nodes, 1, 1, 0.50000
** Name: BC-1 (Up) Type: Displacement/Rotation
*Boundary, amplitude=Amp-1
Upper_nodes, 2, 2, 0.50000
** Name: BC-1 (Bottom) Type: Displacement/Rotation
*Boundary, amplitude=Amp-1
Bottom_nodes, 2, 2, -0.50000
**
**
** OUTPUT REQUESTS
**
*Restart, write, number interval=1, time marks=NO
**
*Output, field
*Node Output
COORD, U, V
*Element Output, directions=YES
E, LE, PE, PEEQ, PEMAG, S, COORD
**
*Output, history, variable=PRESELECT
**
*End Step
